// COMSOL Multiphysics 5.3.0.260 model "proj2.mph"
// Outline of the model tree

Parameters
  freq = 8.5[GHz]
  a = 27.1[mm]
  ar = (10/pi)[mm]
  r1 = a+0*ar
  r2 = a+1*ar
  r3 = a+2*ar
  r4 = a+3*ar
  r5 = a+4*ar
  r6 = a+5*ar
  r7 = a+6*ar
  r8 = a+7*ar
  r9 = a+8*ar
  r10 = a+9*ar
  r11 = a+10*ar
  w1 = 300[mm]
  h1 = 150[mm]
  k0 = 2*pi*freq/c_const

Geometry
  geom1 "Geometry 1" (2D, length unit m)
    r1: Rectangle | base = center; size = {w1, h1}
    c1: Circle | r = r1
    c2: Circle | r = r2
    c3: Circle | r = r3
    c4: Circle | r = r4
    c5: Circle | r = r5
    c6: Circle | r = r6
    c7: Circle | r = r7
    c8: Circle | r = r8
    c9: Circle | r = r9
    c10: Circle | r = r10
    c11: Circle | r = r11
    fin: Finalize "Form Union"

Materials
  mat1: Common "Material 1" on all domains
    def "Basic"
      relpermittivity = 1
      relpermeability = 1
      electricconductivity = 0

Physics
  emw: ElectromagneticWaves "Electromagnetic Waves, Frequency Domain" on all domains
    dependent variable E = {Ex, Ey, Ez}
    BackgroundField.SolveFor = scatteredField
    BackgroundField.Eb = {0, 0, exp(-j*emw.k0*x)}
    wee1: WaveEquationElectric (default)
    pec1: PerfectElectricConductor (default)
    init1: init "Initial Values 1" (default)
    sctr1: Scattering "Scattering Boundary Condition 1" on boundaries 1-4
    pec2: PerfectElectricConductor on boundaries 25, 26, 37, 38

Mesh
  mesh1 "Mesh 1" (physics-controlled)

Studies
  std1 "Study 1"
    freq: Frequency "Frequency Domain" | punit = GHz; plist = freq

Solver configurations
  sol1 "Solution 1" (study std1)
    v1: Variables "Dependent Variables 1"
    s1: Stationary "Stationary Solver 1" | stol = 0.01
      p1: Parametric | pname = freq; plistarr = freq; punit = GHz; pcontinuationmode = no
      fc1: FullyCoupled | linsolver = d1
      d1: Direct "Suggested Direct Solver (emw)" | linsolver = pardiso

Datasets
  dset1: Solution | solution = sol1

Plots
  pg1: PlotGroup2D "Electric Field (emw)" | data = dset1
    surf1: Surface | expr = emw.normE